Given
a := 1
b := 0
c := 0
A_slow := READPRN("a_slow.txt")
A_slow[:, 2] == a*A_slow[:, 0]^2 + b*A_slow[:, 0] + c
[a; b; c] := Minerr(a, b, c) = [0.00409573; 0.372764; -58.4249]
Q(N) := a*N^2 + b*N + c
rate_slow_a := a
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Given
B_slow := READPRN("b_slow.txt")
B_slow[:, 2] == a*B_slow[:, 0]^2 + b*B_slow[:, 0] + c
[a; b; c] := Minerr(a, b, c) = [0.00397125; -0.0969809; 55.4351]
Q(N) := a*N^2 + b*N + c
rate_slow_b := a
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# Относительная эффективность по времени двух медленных сортировок:
f := (rate_slow_a - rate_slow_b)/rate_slow_b = 0.0313448  # Составила 3.1%
Given
a := 1
A_fast := READPRN("a_fast.txt")
A_fast[:, 2] == a*A_fast[:, 0]
a := Minerr(a) = 0.135199
Q(N) := a*N
rate_fast_a := a
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B_fast := READPRN("b_fast.txt")
Given
B_fast[:, 2] == a*B_fast[:, 0]
a := Minerr(a) = 0.118074
Q(N) := a*N
rate_fast_b := a
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# Относительная эффективность по времени двух быстрых сортировок:
f := (rate_fast_a - rate_fast_b)/rate_fast_b = 0.145033  # Составила 14.5%
